OpenVSP model (file version 5), 14 components.
Geometry view with OpenVSP parameter names; values to 6 digits, angles in degrees, lengths in the model's unit.
Overall bounding box: X_Min=0 X_Len=55.256 Y_Min=-18.1074 Y_Len=36.2149 Z_Min=-3.45148 Z_Len=12.8615

Fuselage "FuselageGeom"
  location (X Y Z) 0 0 0, rotation 0 0 0
  bounding box size 46.6596 3.36219 5.53167
  Design: Length=46.6596
  cross sections:
    n  XLocPercent  XRotate  YLocPercent  YRotate   ZLocPercent  shape
    0  0            0        0            -5.78571  -0.0160722   point
    1  0.135119     0        0            -8.35714  0.00153689   circle Circle_Diameter=2.96851
    2  0.351844     0        0            0         -0.00685     edit curve Width=6.14115 Height=3.77895 AbsoluteFlag=0 SymType=1 cubic Bezier points (X Y): 0.273026 0.231668, 0.269737 -0.224519, 0.226974 0.0213828, 0 -0.244051, -0.226974 0.0213828, -0.269737 -0.224519, -0.273026 0.231668, -0.125 0.5378, -0.309211 0.813503, 0 1.06433, 0.309211 0.813503, 0.125 0.5378, 0.273026 0.231668
    3  0.476104     0        0            0         0.00614754   edit curve Width=8.92236 Height=2.65088 AbsoluteFlag=0 SymType=1 cubic Bezier points (X Y): 0.1875 0.132546, 0.180206 -0.24069, 0.191648 -0.192552, 0 -0.537273, -0.191648 -0.192552, -0.180206 -0.24069, -0.1875 0.132546, -0.134868 0.591357, -0.174342 0.907427, 0 1.19043, 0.174342 0.907427, 0.134868 0.591357, 0.1875 0.132546
    4  0.711005     0        0            0         -0.013832    edit curve Width=9.71504 Height=2.2227 AbsoluteFlag=0 SymType=1 cubic Bezier points (X Y): 0.154605 0.292767, 0.138158 -0.143778, 0.1875 -0.316311, 0 -0.235576, -0.1875 -0.316311, -0.138158 -0.143778, -0.154605 0.292767, -0.131579 0.546355, -0.141447 1.02469, 0 1.14179, 0.141447 1.02469, 0.131579 0.546355, 0.154605 0.292767
    5  0.855502     0        0            0         -0.013832    edit curve Width=9.71504 Height=1.69623 AbsoluteFlag=0 SymType=1 cubic Bezier points (X Y): 0.154605 0.292767, 0.138158 -0.143778, 0.1875 -0.316311, 0 -0.235576, -0.1875 -0.316311, -0.138158 -0.143778, -0.154605 0.292767, -0.131579 0.546355, -0.141447 1.02469, 0 1.14179, 0.141447 1.02469, 0.131579 0.546355, 0.154605 0.292767
    6  0.97572      0        0            0         -0.013832    edit curve Width=5.87428 Height=1.34699 AbsoluteFlag=0 SymType=1 cubic Bezier points (X Y): 0.154605 0.292767, 0.138158 -0.143778, 0.1875 -0.316311, 0 -0.235576, -0.1875 -0.316311, -0.138158 -0.143778, -0.154605 0.292767, -0.131579 0.546355, -0.141447 1.02469, 0 1.14179, 0.141447 1.02469, 0.131579 0.546355, 0.154605 0.292767
    7  1            23.1429  0            0         -0.0143443   point

Fuselage "FuselageGeom", child of "FuselageGeom"
  location (X Y Z) 9.2623 0 2.29508, rotation 0 -7.54098 0
  bounding box size 10.0817 2.54528 3.5446
  Design: Length=9.86926
  cross sections:
    n  XLocPercent  YLocPercent  YRotate   ZLocPercent  shape
    0  0            0            0         -0.0116602   point
    1  0.286465     0            -7.71429  0            edit curve Width=2.5 Height=2.22857 AbsoluteFlag=0 SymType=1 cubic Bezier points (X Y): 0.5 -0.210337, 0.509868 -0.32104, 0.276142 -0.265688, 0 -0.265688, -0.276142 -0.265688, -0.509868 -0.32104, -0.5 -0.210337, -0.5 0.0658058, -0.276142 0.5, 0 0.5, 0.276142 0.5, 0.5 0.0658058, 0.5 -0.210337
    2  0.725114     0            0         0.0276639    edit curve Width=2.5 Height=2.04641 AbsoluteFlag=0 SymType=1 cubic Bezier points (X Y): 0.493421 -0.249152, 0.506579 -0.333542, 0.276142 -0.289338, 0 -0.289338, -0.276142 -0.289338, -0.506579 -0.333542, -0.493421 -0.249152, -0.493421 0.0269902, -0.276142 0.5, 0 0.5, 0.276142 0.5, 0.493421 0.0269902, 0.493421 -0.249152
    3  1            0            0         -0.00358607  point

Stack "StackGeom", child of "FuselageGeom"
  location (X Y Z) 18.5246 -2.86885 -1.72131, rotation 0 0 0
  symmetric about XZ
  bounding box size 29.6084 8.9135 3.27155
  cross sections:
    n  VAlign  XDelta      XRotate  XRotateAbs  XSAbsRelFlag  YDelta     YRotate  YRotateAbs  ZDelta     ZRotate   ZRotateAbs  shape
    0  0       0           0        0           1             0          0        0           0          0         0           point
    1  0       2.65116     -13.814  -13.814     1             0          -60      -60         -0.186047  0         0           rounded rectangle RoundRectXSec_Radius=0.2 RoundedRect_Height=5.21835 RoundedRect_Width=2.44688
    2  0       9.06554     26.1863  0           0             0.0111056  57.2434  0           -15.7923   -22.4681  0           circle Circle_Diameter=2.99521
    3  0       9.13953     0        0           1             0          0        0           0.186047   0         0           circle Circle_Diameter=3.17579
    4  0       -0.0465116  0        0           1             0          0        0           0          0         0           point

Wing "WingGeom"
  location (X Y Z) 10.3893 1 0.409836, rotation 0 0 0
  symmetric about XZ
  bounding box size 32.7718 36.2149 2.02318
  totals: TotalSpan=34.2395 TotalProjectedSpan=34.1926 TotalChord=16.0208 TotalArea=453.682 TotalAR=2.57699 MAC=16.4566
  root: chord 30.4008, twist 0, NACA 4-series Camber=0 CamberLoc=0.2 ThickChord=0.06
  sections:
    n  Span     Root_Chord  Tip_Chord  Area     Sweep    Sweep_Location  Dihedral  Twist  Twist_Location  tip airfoil
    1  4.77796  30.4008     14.1824    106.508  73.5143  0               -3        0      0.289286        NACA 4-series Camber=0 CamberLoc=0.2 ThickChord=0.08
    2  12.3418  14.1824     5.31767    120.333  42.5     0               -3        0      0.25            as above

Wing "GO"
  location (X Y Z) 44.0369 5.90164 0.0819672, rotation 0 0 0
  symmetric about XZ
  bounding box size 11.2191 24.3469 0.903414
  totals: TotalSpan=12.5433 TotalProjectedSpan=12.5199 TotalChord=6.01509 TotalArea=75.4491 TotalAR=2.07753 MAC=6.26867
  root: chord 8.15424, twist 0, NACA 4-series Camber=0 CamberLoc=0.2 ThickChord=0.08
  sections:
    n  Span     Root_Chord  Tip_Chord  Area     Sweep  Sweep_Location  Dihedral  Twist  Twist_Location  tip airfoil
    1  6.27165  8.15424     3.87594    37.7246  49.5   0               -3.5      0      0               NACA 4-series Camber=0 CamberLoc=0.2 ThickChord=0.1

Wing "VO"
  location (X Y Z) 31.2807 5.65574 0, rotation 90 0 0
  symmetric about XZ
  bounding box size 17.846 13.5043 9.41004
  totals: TotalSpan=18.9008 TotalProjectedSpan=18.7973 TotalChord=9.7075 TotalArea=149.255 TotalAR=2.36734 MAC=9.93316
  root: chord 17.4803, twist 0, NACA 4-series Camber=0 CamberLoc=0.2 ThickChord=0.07
  sections:
    n  Span    Root_Chord  Tip_Chord  Area     Sweep    Sweep_Location  Dihedral  Twist  Twist_Location  tip airfoil
    1  2.4881  17.4803     9.58396    33.6692  72.8571  0               -6        0      0.25            NACA 4-series Camber=0 CamberLoc=0.2 ThickChord=0.0535714
    2  6.9623  9.58396     2.18176    40.9582  47.5     0               -6        0      0.25            NACA 4-series Camber=0 CamberLoc=0.2 ThickChord=0.1

NGonMesh "MeshGeom_NGon"
  location (X Y Z) 0 0 0, rotation 0 0 0

NGonMesh "MeshGeom_NGon"
  location (X Y Z) 0 0 0, rotation 0 0 0

NGonMesh "MeshGeom_NGon"
  location (X Y Z) 0 0 0, rotation 0 0 0

NGonMesh "MeshGeom_NGon"
  location (X Y Z) 0 0 0, rotation 0 0 0

NGonMesh "MeshGeom_NGon"
  location (X Y Z) 0 0 0, rotation 0 0 0

NGonMesh "MeshGeom_NGon"
  location (X Y Z) 0 0 0, rotation 0 0 0

NGonMesh "MeshGeom_NGon"
  location (X Y Z) 0 0 0, rotation 0 0 0

NGonMesh "MeshGeom_NGon"
  location (X Y Z) 0 0 0, rotation 0 0 0

VSPAERO settings (reference component "WingGeom"): Sref=453.682 bref=34.2395 cref=16.0208 Xcg=0 Ycg=0 Zcg=0 AlphaStart=0 AlphaEnd=4 AlphaNpts=5 BetaStart=0 BetaEnd=0 BetaNpts=1 MachStart=0.1 MachEnd=0.8 MachNpts=9 ReCref=1e+07 Vinf=100 Rho=0.002377
